z := l1 + l3*(cos(q2)*sin(q3) + cos(q3)*sin(q2)) + l2*sin(q2)
x := -l3*(cos(q2)*cos(q3)*sin(q1) - sin(q1)*sin(q2)*sin(q3)) - l2*cos(q2)*sin(q1)
y := l3*(cos(q1)*cos(q2)*cos(q3) - cos(q1)*sin(q2)*sin(q3)) + l2*cos(q1)*cos(q2)
[d/dq1(x), d/dq2(x), d/dq3(x); d/dq1(y), d/dq2(y), d/dq3(y); d/dq1(z), d/dq2(z), d/dq3(z)] simplify → [
    -cos(q1)*(l3*cos(q2 + q3) + l2*cos(q2)), sin(q1)*(l3*sin(q2 + q3) + l2*sin(q2)), l3*sin(q2 + q3)*sin(q1);
    -sin(q1)*(l3*cos(q2 + q3) + l2*cos(q2)), (l3*sin(q2 + q3) + l2*sin(q2))*(2*sin(q1/2)^2 - 1), -l3*sin(q2 + q3)*cos(q1);
    0, l3*cos(q2 + q3) + l2*cos(q2), l3*cos(q2 + q3)
]
[
    -l3*(cos(q2)*cos(q3)*sin(q1) - sin(q1)*sin(q2)*sin(q3)) - l2*cos(q2)*sin(q1);
    l3*(cos(q1)*cos(q2)*cos(q3) - cos(q1)*sin(q2)*sin(q3)) + l2*cos(q1)*cos(q2);
    l1 + l3*(cos(q2)*sin(q3) + cos(q3)*sin(q2)) + l2*sin(q2);
    1
] =  # error: This variable is undefined.
l1 + l3*(cos(q2)*sin(q3) + cos(q3)*sin(q2)) + l2*sin(q2) simplify → l1 + l3*sin(q2 + q3) + l2*sin(q2)
cos(π - q2) → -cos(q2)
[x1; y1] := [q1; y0]
[x1'; y1'] := [d/dq1(x1); d/dq1(y1)]*q1'
x1' → q1'
[x2; y2] := [q1 + 0.5*l2*cos(π - q2); y0 + 0.5*l2*sin(π - q2)]
j := l2*sin(π - q2)
[x2'; y2'] := [d/dq1(x2), d/dq2(x2); d/dq1(y2), d/dq2(y2)]*[q1'; q2']
j → l2*sin(q2)
y1 := 0.5*l1
y2 := y1 + 0.5*l1 + 0.5*l2*sin(q2)
x2 → q1 + (-0.5*l2*cos(q2))
d/dq2(L1*cos(q1) + L2*cos(q1 + q2)) → -L2*sin(q1 + q2)
y3 := y2 + 0.5*l2 + 0.5*l3*sin(q3)
[d/dq1(x2), d/dq2(x2); d/dq1(y2), d/dq2(y2)] → [1, 0.5*l2*sin(q2); 0, 0.5*l2*cos(q2)]
[K1; K2] := [1/2*m1*(x1'^2 + y1'^2); 1/2*m2*(x2'^2 + y2'^2)]
L1*cos(q1) + L2*cos(q1 + q2)
[P1; P2; P3] := [m1*g*y1; m2*g*y2; m3*g*y3]
y4 := y3 + 0.5*(l3 + ee)
P1' := m1*g*L1*sin(q1)
P2' := m2*g*(L1*sin(q1) + L2*sin(q1 + q2))
P4 := m4*g*y4
V := P1 + P2 + P3 + P4
V2 := P1' + P2'
V → g*m2*(1.0*l1 + 0.5*l2*sin(q2)) + g*m4*(0.5*ee + 1.0*l1 + 0.5*l2 + 0.5*l3 + 0.5*l2*sin(q2) + 0.5*l3*sin(q3)) + g*m3*(1.0*l1 + 0.5*l2 + 0.5*l2*sin(q2) + 0.5*l3*sin(q3)) + 0.5*g*l1*m1
K := [K1; K2]
G := [d/dq1(V); d/dq2(V); d/dq3(V)]
(m1 + m2)*L1*g*cos(q1) + m2*g*L2*cos(q1 + q2) =  # error
P := [P1; P2]
G simplify → [0; 0.5*g*l2*cos(q2)*(m2 + m3 + m4); 0.5*g*l3*cos(q3)*(m3 + m4)]
g*m2*(L2*cos(q1 + q2) + L1*cos(q1)) + L1*g*m1*cos(q1) =  # error
0.5
L := K - P
L → [
    m1*q1'^2/2 + (-0.5*g*l1*m1);
    m2*((q1' + 0.5*l2*q2'*sin(q2))^2 + 0.25*l2^2*q2'^2*cos(q2)^2)/2 - g*m2*(1.0*l1 + 0.5*l2*sin(q2))
]
L := l1^2*m1*q1'^2/2 - g*m1*y0 + (m2*((q1' - l2*q2'*sin(q2))^2 + l2^2*q2'^2*cos(q2)^2)/2 - g*m2*(y0 + l2*sin(q2)))
m1*q1'(t)*l1^2 + m2*(2*q1' - 2*l2*q2'*sin(q2))/2
d/dt(m2*(2*l2^2*q2'(t)*cos(q2(t))^2 - 2*l2*sin(q2(t))*(q1'(t) - l2*q2'(t)*sin(q2(t))))/2) → m2*(2*l2^2*d/dt(q2'(t))*cos(q2(t))^2 + 2*l2*sin(q2(t))*(l2*d/dt(q2'(t))*sin(q2(t)) - d/dt(q1'(t)) + l2*q2'(t)*d/dt(q2(t))*cos(q2(t))) - 2*l2*d/dt(q2(t))*cos(q2(t))*(q1'(t) - l2*q2'(t)*sin(q2(t))) - 4*l2^2*q2'(t)*d/dt(q2(t))*cos(q2(t))*sin(q2(t)))/2
d/dq2(L) → -m2*(2*l2^2*q2'^2*cos(q2)*sin(q2) + 2*l2*q2'*cos(q2)*(q1' - l2*q2'*sin(q2)))/2 - g*l2*m2*cos(q2)
tau1 := l1^2*m1*q1'' - m2*(2*l2*q2''*sin(q2(t)) - 2*q1'' + 2*l2*q2'(t)*q2'*cos(q2(t)))/2
tau2 := m2*(2*l2^2*d/dt(q2'(t))*cos(q2(t))^2 + 2*l2*sin(q2(t))*(l2*d/dt(q2'(t))*sin(q2(t)) - d/dt(q1'(t)) + l2*q2'(t)*d/dt(q2(t))*cos(q2(t))) - 2*l2*d/dt(q2(t))*cos(q2(t))*(q1'(t) - l2*q2'(t)*sin(q2(t))) - 4*l2^2*q2'(t)*d/dt(q2(t))*cos(q2(t))*sin(q2(t)))/2 - (-m2*(2*l2^2*q2'^2*cos(q2)*sin(q2) + 2*l2*q2'*cos(q2)*(q1' - l2*q2'*sin(q2)))/2 - g*l2*m2*cos(q2))
